<?xml version="1.0"?>
<?xml-stylesheet type="text/xsl" href="http://jsbsim.sourceforge.net/JSBSim.xsl"?>

<fdm_config name="mini3pro" version="1.0" release="ALPHA"
    xmlns:xsi="http://www.w3.org/2001/XMLSchema-instance"
    xsi:noNamespaceSchemaLocation="http://jsbsim.sourceforge.net/JSBSim.xsd">
    <fileheader>
        <author>sryu1</author>
        <email>noahsryu@gmail.com</email>
        <version>1.0</version>
        <description>FDM of a DJI Mini 3 Pro</description>
    </fileheader>
    <metrics>
        <wingarea></wingarea>

        <wingspan></wingspan>

        <chord></chord>

        <location>
            <x></x>

            <y></y>

            <z></z>
        </location>
    </metrics>
    <mass_balance>
        <location>
            <x></x>

            <y></y>

            <z></z>
        </location>
        <ixx></ixx>

        <iyy></iyy>

        <izz></izz>

        <emptywt></emptywt>

    </mass_balance>
</fdm_config>
